V_inmax := 32.6 V
n_mics := 15
I_inmax := 9.21 A
V_inverter := 360 V
V_out := V_inverter/n_mics = 24 V
D_buck := V_out/V_inmax = 0.736196
f_sw := 50 kHz
L := 0.1 mH
ΔL_max := (V_inmax - V_out)*D_buck/(f_sw*L) = 1.26626 A
P := V_inmax*I_inmax = 300.246 W
I_out := P/V_out = 12.5103 A
I_swmax := ΔL_max/2 + I_out = 13.1434 A
BOOST
V_outboost := 90 V
V_inboost := 1 V
P := V_inboost*9.21 A = 9.21 W
D_boost := (V_outboost - V_inboost)/V_outboost = 0.988889
I_outboost := P/V_outboost = 0.102333 A
ΔL_maxboost := V_inboost*D_boost/(f_sw*L) = 0.197778 A
I_swmaxboost := ΔL_maxboost/2 + I_outboost/(1 - D_boost) = 9.30889 A
