Given
x_1 == r - x_6
x_2 == x_1 - x_5
x_3 == G_1*x_2
x_4 == x_3 - y
x_5 == H_1*x_4
x_6 == H_2*y
y == G_2*x_4
Find(x_1, x_2, x_3, x_4, x_5, x_6, y) → [
    (r + G_2*r + G_1*H_1*r)/(G_2 + G_1*H_1 + G_1*G_2*H_2 + 1);
    (r + G_2*r)/(G_2 + G_1*H_1 + G_1*G_2*H_2 + 1);
    (G_1*r + G_1*G_2*r)/(G_2 + G_1*H_1 + G_1*G_2*H_2 + 1);
    G_1*r/(G_2 + G_1*H_1 + G_1*G_2*H_2 + 1);
    G_1*H_1*r/(G_2 + G_1*H_1 + G_1*G_2*H_2 + 1);
    G_1*G_2*H_2*r/(G_2 + G_1*H_1 + G_1*G_2*H_2 + 1);
    G_1*G_2*r/(G_2 + G_1*H_1 + G_1*G_2*H_2 + 1)
]
y/r == G_1*G_2/(G_2 + G_1*H_1 + G_1*G_2*H_2 + 1)
