# Opgave 3
# b)
G_c(s, K_i, K_p) := K_p*(s + K_i)/s
G_p(s) := 1000/(s^2 + 20*s + 100)
G_ol(s, K_i, K_p) := G_c(s, K_i, K_p)*G_p(s) → 1000*K_p*(K_i + s)/(s*(s^2 + 20*s + 100))
G_cl(s, K_i, K_p) := G_ol(s, K_i, K_p)/(G_ol(s, K_i, K_p) + 1) simplify → 1000*K_p*(K_i + s)/(100*s + 20*s^2 + s^3 + 1000*K_i*K_p + 1000*K_p*s)
0 == s^3 + 20*s^2 + (1000*K_p + 100)*s + 1000*K_i*K_p
# c)
R(K_p, K_i) := [1, 1000*K_p + 100; 20, 1000*K_p*K_i]
b_1(K_p, K_i) := -1/20*det([1, 1000*K_p + 100; 20, 1000*K_p*K_i]) → 1000*K_p - 50*K_i*K_p + 100
c_1(K_p, K_i) := -1/b_1(K_p, K_i)*det([20, 1000*K_p*K_i; b_1(K_p, K_i), 0]) simplify → 1000*K_i*K_p
# d)
N(s) := 1000*(s + 40)
D(s) := s^3 + 20*s^2 + 100*s
dN(s) := d/ds(N(s)) → 1000
dD(s) := d/ds(D(s)) → 3*s^2 + 40*s + 100
N(s)*dD(s) - dN(s)*D(s) == 0
N(s)*dD(s) - dN(s)*D(s) simplify → 2000*(s + 10)*(s^2 + 60*s + 200)
0 == 2000*(s + 10)*(s^2 + 60*s + 200)
s_1 := [-10; 10*sqrt(7) - 30; -10*sqrt(7) - 30] = [-10; -3.54249; -56.4575]
