# A)
A := [0, 1, 0; 0, 0, 1; -5, -9, -5]
B := [0; 0; 2]
C := [1, 0, 0]
# B)
G(s) := C*(s*[1, 0, 0; 0, 1, 0; 0, 0, 1] - A)^-1*B → 2/(s^3 + 5*s^2 + 9*s + 5)
# C)
|λ*[1, 0, 0; 0, 1, 0; 0, 0, 1] - A| → λ^3 + 5*λ^2 + 9*λ + 5
Given
|λ*[1, 0, 0; 0, 1, 0; 0, 0, 1] - A| == 0
Find(λ) → [-1, -2 + 1i, -2 - 1i]
# D)
α_c(s) := (s + 3)*(s + 4)*(s + 5) expand → s^3 + 12*s^2 + 47*s + 60
# E)
K(K_1, K_2, K_3) := [K_1, K_2, K_3]
A_cl(K_1, K_2, K_3) := A - B*K(K_1, K_2, K_3) simplify → [0, 1, 0; 0, 0, 1; -2*K_1 - 5, -2*K_2 - 9, -2*K_3 - 5]
|λ*[1, 0, 0; 0, 1, 0; 0, 0, 1] - A_cl(K_1, K_2, K_3)| → 2*K_1 + 9*λ + 2*K_3*λ^2 + 5*λ^2 + λ^3 + 2*K_2*λ + 5
0 == s^3 + (2*K_3 + 5)*s^2 + (2*K_2 + 9)*s + (2*K_1 + 5)
12 == (2*K_3 + 5)
47 == (2*K_2 + 9)
60 == (2*K_1 + 5)
K := [27.5, 19, 3.5]
