# EXAM JAN 2013
# [area: Problem 1]
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# 1. Forskellige sammenhænge.
# Se papir
# 2. Se side 99
0.3/0.8 = 0.375
0.5/0.8 = 0.625
# 3. Se side 120
μ_x == sum(x*f(x), x = 1 .. 2)
μ_x := 1*0.4 + 2*0.6 = 1.6
σ_2 == sum((x - μ)^2*f(x), x = 1 .. 2)
σ_x := (1 - μ_x)^2*0.4 + (2 - μ_x)^2*0.6 = 0.24
# 4. Is X og Y independent:
# If:
f(x, y) == g(x)*h(y)
f(1, 1) == g(x == 1)*h(y == 1)
g(x == 1) == sum(f(1, y), y) == 0.4
h(y == 1) == sum(f(x, 1), x) == 0.8
0.4*0.8 = 0.32
0.3 ≠ 0.32
# 5. Correlation between X and Y
# Correlation coefficient:
ρ_XY == σ_XY/(σ_X*σ_Y)
# First find mean and deviance of Y:
μ_y == sum(y*f(y), y = 1 .. 2)
μ_y := 1*0.8 + 2*0.2 = 1.2
σ_2 == sum((x - μ_y)^2*f(y), x = 1 .. 2)
σ_y := (1 - μ_y)^2*0.8 + (2 - μ_y)^2*0.2 = 0.16
σ_XY := (1 - μ_x)*(1 - μ_y)*0.3 + (1 - μ_x)*(2 - μ_y)*0.1 + (2 - μ_x)*(1 - μ_y)*0.5 + (2 - μ_x)*(2 - μ_y)*0.1 = -0.02
ρ_XY := σ_XY/(sqrt(σ_x)*sqrt(σ_y)) = -0.102062
# [area: Problem 2]
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# 1. The poisson parameter:
λ := 2/5 = 0.4
# 2. Expected number during 30 minutes.
# 2 fald pr. 5. minut.
2*30/5 = 12
# 3. Probability
λt := 12
P(x ≥ 5)
1 - P(x < 5)
P := 1 - sum(e^(-λt)*λt^x/x!, x = 0 .. 4) = 99.24 %
# [area: Problem 3]
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# 1. Mean and variance calculated in Matlab:
# - Mean:
# 61.971429
#
# - Median:
# 62.100000
#
# - Sample variance, S^2:
# 0.815714
#
# - Standard deviation, S:
# 0.903169
# 2. Confidence interval:
# - For mean, using t:
# Number of samples:
N := 7
# Degrees of freedom:
v := N - 1 = 6
# Mean and deviance (found in previous question):
μ := 61.971429
σ_2 := 0.815714
σ := sqrt(σ_2) = 0.903169
# Confidence interval:
α := 90 %
α_½ := (1 - α)/2 = 0.05
# Find t_0.05:
t_0.05 := 1.943
μ + t_0.05*σ/sqrt(N) = 62.6347
μ - t_0.05*σ/sqrt(N) = 61.3082
# - For variance, usnig χ^2:
# Number of samples:
N := 7
# Degrees of freedom:
v := N - 1 = 6
# Mean and deviance (found in previous question):
μ := 61.971429
σ_2 := 0.815714
σ := sqrt(σ_2) = 0.903169
# Confidence interval:
α := 90 %
α_½ := (1 - α)/2 = 0.05
# Table:
χ_0.05 := 12.592
χ_0.95 := 1.635
# Side 304, slide 12/lecture 6
(v*σ^2)/χ_0.05 = 0.388682
(v*σ^2)/χ_0.95 = 2.99345
0.39 < σ^2 < 2.99
# 4. Nej
# 5. Find deviance.
μ := 62
σ_ny := 1
Given
1/(sqrt(2*π)*σ_ny)*integral(e^(-(x - μ)^2/(2*σ_ny^2)), x = 0 .. 61) == 0.02
σ_ny := Find(σ_ny) = 0.486914
σ_ny = 0.486914
# [area: Problem 4]
# 16.18
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# 3. See example 8.6 p. 240.
# Find mean and standard deviation:
μ_A := 23.5
μ_B := 22.2
σ_2A := 3.48
σ_2B := 0.688
n_A := 4
n_B := 6
μ_AB := μ_A - μ_B = 1.3
σ_AB := sqrt(σ_2A/n_A + σ_2B/n_B) = 0.992304
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X_1 - X_2 > 0
Z := (0 - μ_AB)/σ_AB = -1.31008  # Z skal være mindre end -1.31
P(X_1 - X_2 > 0) == P(Z < -1.31) == 0.0951
P := 0.0951 = 9.51 %
