C_1 := 10000*pF
C_2 := 1200*pF
α_1 := 1/(68.2 μs)
α_2 := 1/(0.405 μs)
R_1 := 1/(2*C_2)*((1/α_1 + 1/α_2) - sqrt((1/α_1 + 1/α_2)^2 - 4*(C_1 + C_2)/(α_1*α_2*C_1))) = 378.271 Ω
R_2 := 1/(2*(C_2 + C_1))*((1/α_1 + 1/α_2) + sqrt((1/α_1 + 1/α_2)^2 - 4*(C_1 + C_2)/(α_1*α_2*C_1))) = 6.08492 kΩ
η := 1/(1 + C_2/C_1) = 0.892857
